**  Abaqus input file created by pyFormex 0.8.4-a4 (http://pyformex.org)
**
*HEADING
Model: SpaceTruss     Date: 2011-07-09 14:10:10.183327      Created by pyFormex
Script: /home/bene/prj/pyformex/pyformex/examples/SpaceTrussRoof_abq.py


*NODE, NSET=Nall
1,  -9.000000e+02,  -9.000000e+02,  -9.000000e+02
2,   9.000000e+02,  -9.000000e+02,  -9.000000e+02
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*NSET,NSET=Nset_0
11,
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*NSET,NSET=Nset_1
6,
7,
8,
9,
16,
23,
24,
27,
33,
36,
38,
41,
42,
45,
*NSET,NSET=Nset_2
1,
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*ELEMENT, TYPE=T3D2, ELSET=Eset_0_grp_0
1, 6, 7
2, 7, 8
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*ELSET,ELSET=Eall
Eset_0_grp_0
*ELSET,ELSET=Eset_0
Eset_0_grp_0
*ELEMENT, TYPE=T3D2, ELSET=Eset_1_grp_0
32, 1, 2
33, 2, 3
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*ELSET,ELSET=Eall
Eset_1_grp_0
*ELSET,ELSET=Eset_1
Eset_1_grp_0
*ELEMENT, TYPE=T3D2, ELSET=Eset_2_grp_0
81, 6, 1
82, 6, 2
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*ELSET,ELSET=Eall
Eset_2_grp_0
*ELSET,ELSET=Eset_2
Eset_2_grp_0
*MATERIAL, NAME=S500
*ELASTIC
210000.0,0.3
*DENSITY
7.85e-06
*SOLID SECTION, ELSET=Eset_0, MATERIAL=S500
314.159265359
*SOLID SECTION, ELSET=Eset_1, MATERIAL=S500
314.159265359
*SOLID SECTION, ELSET=Eset_2, MATERIAL=S500
314.159265359
*BOUNDARY
Nset_2, 1
Nset_2, 2
Nset_2, 3
